<?xml version="1.0"?>

<propeller name="prop">
  <ixx> 1.9 </ixx>
  <diameter unit="M"> 2.0 </diameter>
  <numblades>           2 </numblades>
  <minpitch>           20 </minpitch>
  <maxpitch>           26 </maxpitch>
  <gearratio>         1.0 </gearratio>

  <table name="C_THRUST" type="internal">
    <tableData>
                15	19	23	27
      0.00	0.082	0.077	0.088	0.101
      0.10	0.082	0.080	0.088	0.099
      0.15	0.080	0.083	0.087	0.096
      0.20	0.078	0.084	0.086	0.094
      0.25	0.076	0.085	0.086	0.092
      0.30	0.072	0.084	0.085	0.090
      0.35	0.067	0.082	0.083	0.088
      0.40	0.061	0.078	0.082	0.086
      0.45	0.055	0.073	0.080	0.084
      0.50	0.047	0.068	0.079	0.082
      0.55	0.038	0.062	0.077	0.081
      0.60	0.030	0.055	0.074	0.080
      0.65	0.022	0.047	0.070	0.080
      0.70	0.014	0.040	0.064	0.078
      0.75	0.007	0.032	0.057	0.075
      0.80	0.002	0.025	0.051	0.071
      0.85	-0.005	0.018	0.044	0.066
      0.90	-0.011	0.011	0.038	0.060
      0.95	-0.017	0.003	0.031	0.054
      1.00	-0.023	-0.006	0.024	0.048
      1.05	-0.030	-0.012	0.017	0.042
      1.10	-0.036	-0.019	0.011	0.036
      1.15	-0.042	-0.026	0.004	0.029
      1.20	-0.048	-0.033	-0.003	0.022
      1.25	-0.052	-0.040	-0.009	0.016
      1.30	-0.058	-0.046	-0.016	0.009
      1.35	-0.063	-0.053	-0.022	-0.001
      1.40	-0.069	-0.060	-0.029	-0.011
      1.45	-0.074	-0.067	-0.036	-0.020
      1.50	-0.080	-0.074	-0.042	-0.030
      1.55	-0.085	-0.080	-0.049	-0.039
      1.60	-0.091	-0.087	-0.055	-0.049
      1.65	-0.096	-0.094	-0.062	-0.058
      1.70	-0.102	-0.101	-0.069	-0.068
      1.75	-0.107	-0.108	-0.075	-0.077
    </tableData>
  </table>

  <table name="C_POWER" type="internal">
    <tableData>
                15	19	23	27
      0.00	0.039	0.056	0.084	0.115
      0.10	0.039	0.056	0.082	0.113
      0.15	0.040	0.055	0.080	0.109
      0.20	0.040	0.055	0.079	0.106
      0.25	0.040	0.054	0.076	0.102
      0.30	0.039	0.054	0.074	0.099
      0.35	0.039	0.053	0.072	0.096
      0.40	0.037	0.051	0.070	0.095
      0.45	0.035	0.050	0.068	0.092
      0.50	0.032	0.049	0.067	0.089
      0.55	0.027	0.046	0.065	0.087
      0.60	0.023	0.043	0.064	0.085
      0.65	0.018	0.039	0.062	0.084
      0.70	0.013	0.035	0.059	0.082
      0.75	0.008	0.030	0.055	0.080
      0.80	0.004	0.025	0.051	0.077
      0.85	0.001	0.019	0.047	0.073
      0.90	-0.003	0.014	0.041	0.069
      0.95	-0.006	0.009	0.036	0.064
      1.00	-0.009	0.004	0.030	0.059
      1.05	-0.013	0.002	0.024	0.054
      1.10	-0.016	0.000	0.019	0.047
      1.15	-0.020	-0.002	0.016	0.041
      1.20	-0.023	-0.004	0.004	0.033
      1.25	-0.026	-0.006	-0.007	0.025
      1.30	-0.030	-0.007	-0.018	0.018
      1.35	-0.033	-0.009	-0.029	0.004
      1.40	-0.037	-0.011	-0.041	-0.009
      1.45	-0.040	-0.013	-0.052	-0.023
      1.50	-0.043	-0.015	-0.063	-0.036
      1.55	-0.047	-0.016	-0.074	-0.049
      1.60	-0.050	-0.018	-0.085	-0.063
      1.65	-0.054	-0.020	-0.097	-0.076
      1.70	-0.057	-0.022	-0.108	-0.090
      1.75	-0.060	-0.024	-0.119	-0.103
    </tableData>
  </table>
</propeller>
